OpenVSP model (file version 5), 4 components.
Geometry view with OpenVSP parameter names; values to 6 digits, angles in degrees, lengths in the model's unit.
Overall bounding box: X_Min=0 X_Len=10 Y_Min=-5 Y_Len=10 Z_Min=-0.75 Z_Len=2.55

Fuselage "FuselageGeom"
  location (X Y Z) 0 0 0, rotation 0 0 0
  bounding box size 10 1.5 1.5
  Design: Length=10
  cross sections:
    n  XLocPercent  YLocPercent  ZLocPercent  shape
    0  0            0            0            point
    1  0.25         0            0            ellipse Ellipse_Height=1.5 Ellipse_Width=1.5
    2  0.5          0            0            as above
    3  0.75         0            0            as above
    4  1            0            0            point

Wing "WingGeom"
  location (X Y Z) 4 0 0, rotation 0 0 0
  symmetric about XZ
  bounding box size 2.58975 10 0.240109
  totals: TotalSpan=10 TotalProjectedSpan=10 TotalChord=1.5 TotalArea=15 TotalAR=6.66667 MAC=1.55556
  root: chord 2, twist 0, NACA 4-series Camber=0 CamberLoc=0.1 ThickChord=0.12
  sections:
    n  Span  Root_Chord  Tip_Chord  Area  Sweep  Sweep_Location  Dihedral  Twist  Twist_Location  tip airfoil
    1  5     2           1          7.5   15     0.25            0         0      0.25            as above

Wing "WingGeom"
  location (X Y Z) 8 0 0, rotation 0 0 0
  symmetric about XZ
  bounding box size 1.2859 4 0.144065
  totals: TotalSpan=4 TotalProjectedSpan=4 TotalChord=0.9 TotalArea=3.6 TotalAR=4.44444 MAC=0.933333
  root: chord 1.2, twist 0, NACA 4-series Camber=0 CamberLoc=0.1 ThickChord=0.12
  sections:
    n  Span  Root_Chord  Tip_Chord  Area  Sweep  Sweep_Location  Dihedral  Twist  Twist_Location  tip airfoil
    1  2     1.2         0.6        1.8   15     0.25            0         0      0.25            as above

Wing "WingGeom"
  location (X Y Z) 8 0 0, rotation 90 0 0
  bounding box size 1.73935 0.180081 1.8
  totals: TotalSpan=1.8 TotalProjectedSpan=1.8 TotalChord=1.1 TotalArea=1.98 TotalAR=1.63636 MAC=1.14848
  root: chord 1.5, twist 0, NACA 4-series Camber=0 CamberLoc=0.1 ThickChord=0.12
  sections:
    n  Span  Root_Chord  Tip_Chord  Area  Sweep  Sweep_Location  Dihedral  Twist  Twist_Location  tip airfoil
    1  1.8   1.5         0.7        1.98  25     0.25            0         0      0.25            as above
